// SBML level 3 version 2

model biocrnpyler_941996()
  // model units - substance: mole, time: second, volume: litre, area: square_metre, length: metre, extent: mole

  // Compartments:
  compartment default = 1e-6;

  // Species:
  species dna_X in default = 0.5;
  species protein_RNAP_machinery in default = 10;
  species rna_X in default = 0;
  species complex_dna_X_protein_RNAP_machinery_ in default = 0;
  species protein_Ribo_machinery in default = 50;
  species protein_X in default = 0;
  species complex_protein_Ribo_machinery_rna_X_ in default = 0;
  species protein_RNAase_machinery in default = 5;
  species dna_cellular_processes in default = 0.01;
  species rna_cellular_processes in default = 0;
  species complex_dna_cellular_processes_protein_RNAP_machinery_ in default = 0;
  species protein_cellular_processes in default = 0;
  species complex_protein_Ribo_machinery_rna_cellular_processes_ in default = 0;
  species complex_protein_RNAase_machinery_rna_X_ in default = 0;
  species complex_complex_protein_Ribo_machinery_rna_X__protein_RNAase_machinery_ in default = 0;
  species complex_protein_RNAase_machinery_rna_cellular_processes_ in default = 0;
  species complex_complex_protein_Ribo_machinery_rna_cellular_processes__protein_RNAase_machinery_ in default = 0;

  // Parameters:
  kb__ = 100;
  ku_strong_ = 0.5;
  ktx_strong_ = 3.926188;
  ku_weak_ = 5;
  ktl__ = 0.05;
  kb__transcription = 500;
  ku__transcription = 50;
  ktx__transcription = 0.1;
  kb__translation = 500;
  ku__translation = 5;
  ktl__translation = 0.1;
  ku__ = 10;
  kdeg__rna_degredation_mm = 0.001;
  kdil__ = 0.001;

  // Reactions:
  r0: dna_X + protein_RNAP_machinery => complex_dna_X_protein_RNAP_machinery_; kb__*dna_X*protein_RNAP_machinery;
  r0rev: complex_dna_X_protein_RNAP_machinery_ => dna_X + protein_RNAP_machinery; ku_strong_*complex_dna_X_protein_RNAP_machinery_;
  r1: complex_dna_X_protein_RNAP_machinery_ => dna_X + rna_X + protein_RNAP_machinery; ktx_strong_*complex_dna_X_protein_RNAP_machinery_;
  r2: rna_X + protein_Ribo_machinery => complex_protein_Ribo_machinery_rna_X_; kb__*rna_X*protein_Ribo_machinery;
  r2rev: complex_protein_Ribo_machinery_rna_X_ => rna_X + protein_Ribo_machinery; ku_weak_*complex_protein_Ribo_machinery_rna_X_;
  r3: complex_protein_Ribo_machinery_rna_X_ => rna_X + protein_X + protein_Ribo_machinery; ktl__*complex_protein_Ribo_machinery_rna_X_;
  r4: dna_cellular_processes + protein_RNAP_machinery => complex_dna_cellular_processes_protein_RNAP_machinery_; kb__transcription*dna_cellular_processes*protein_RNAP_machinery;
  r4rev: complex_dna_cellular_processes_protein_RNAP_machinery_ => dna_cellular_processes + protein_RNAP_machinery; ku__transcription*complex_dna_cellular_processes_protein_RNAP_machinery_;
  r5: complex_dna_cellular_processes_protein_RNAP_machinery_ => dna_cellular_processes + rna_cellular_processes + protein_RNAP_machinery; ktx__transcription*complex_dna_cellular_processes_protein_RNAP_machinery_;
  r6: rna_cellular_processes + protein_Ribo_machinery => complex_protein_Ribo_machinery_rna_cellular_processes_; kb__translation*rna_cellular_processes*protein_Ribo_machinery;
  r6rev: complex_protein_Ribo_machinery_rna_cellular_processes_ => rna_cellular_processes + protein_Ribo_machinery; ku__translation*complex_protein_Ribo_machinery_rna_cellular_processes_;
  r7: complex_protein_Ribo_machinery_rna_cellular_processes_ => rna_cellular_processes + protein_cellular_processes + protein_Ribo_machinery; ktl__translation*complex_protein_Ribo_machinery_rna_cellular_processes_;
  r8: rna_X + protein_RNAase_machinery => complex_protein_RNAase_machinery_rna_X_; kb__*rna_X*protein_RNAase_machinery;
  r8rev: complex_protein_RNAase_machinery_rna_X_ => rna_X + protein_RNAase_machinery; ku__*complex_protein_RNAase_machinery_rna_X_;
  r9: complex_protein_RNAase_machinery_rna_X_ => protein_RNAase_machinery; kdeg__rna_degredation_mm*complex_protein_RNAase_machinery_rna_X_;
  r10: complex_protein_Ribo_machinery_rna_X_ + protein_RNAase_machinery => complex_complex_protein_Ribo_machinery_rna_X__protein_RNAase_machinery_; kb__*complex_protein_Ribo_machinery_rna_X_*protein_RNAase_machinery;
  r10rev: complex_complex_protein_Ribo_machinery_rna_X__protein_RNAase_machinery_ => complex_protein_Ribo_machinery_rna_X_ + protein_RNAase_machinery; ku__*complex_complex_protein_Ribo_machinery_rna_X__protein_RNAase_machinery_;
  r11: complex_complex_protein_Ribo_machinery_rna_X__protein_RNAase_machinery_ => protein_Ribo_machinery + protein_RNAase_machinery; kdeg__rna_degredation_mm*complex_complex_protein_Ribo_machinery_rna_X__protein_RNAase_machinery_;
  r12: rna_cellular_processes + protein_RNAase_machinery => complex_protein_RNAase_machinery_rna_cellular_processes_; kb__*rna_cellular_processes*protein_RNAase_machinery;
  r12rev: complex_protein_RNAase_machinery_rna_cellular_processes_ => rna_cellular_processes + protein_RNAase_machinery; ku__*complex_protein_RNAase_machinery_rna_cellular_processes_;
  r13: complex_protein_RNAase_machinery_rna_cellular_processes_ => protein_RNAase_machinery; kdeg__rna_degredation_mm*complex_protein_RNAase_machinery_rna_cellular_processes_;
  r14: complex_protein_Ribo_machinery_rna_cellular_processes_ + protein_RNAase_machinery => complex_complex_protein_Ribo_machinery_rna_cellular_processes__protein_RNAase_machinery_; kb__*complex_protein_Ribo_machinery_rna_cellular_processes_*protein_RNAase_machinery;
  r14rev: complex_complex_protein_Ribo_machinery_rna_cellular_processes__protein_RNAase_machinery_ => complex_protein_Ribo_machinery_rna_cellular_processes_ + protein_RNAase_machinery; ku__*complex_complex_protein_Ribo_machinery_rna_cellular_processes__protein_RNAase_machinery_;
  r15: complex_complex_protein_Ribo_machinery_rna_cellular_processes__protein_RNAase_machinery_ => protein_Ribo_machinery + protein_RNAase_machinery; kdeg__rna_degredation_mm*complex_complex_protein_Ribo_machinery_rna_cellular_processes__protein_RNAase_machinery_;
  r16: rna_X => ; kdil__*rna_X;
  r17: protein_X => ; kdil__*protein_X;
  r18: rna_cellular_processes => ; kdil__*rna_cellular_processes;
  r19: protein_cellular_processes => ; kdil__*protein_cellular_processes;

  // Unit definitions:
  unit square_metre = metre^2;
end
