// SBML level 3 version 2

model biocrnpyler_415284()
  // model units - substance: mole, time: second, volume: litre, area: square_metre, length: metre, extent: mole

  // Compartments:
  compartment default = 1e-6;

  // Species:
  species dna_X in default = 0;
  species protein_RNAP_machinery in default = 0;
  species rna_X in default = 0;
  species complex_dna_X_protein_RNAP_machinery_ in default = 0;
  species protein_Ribo_machinery in default = 0;
  species protein_X in default = 0;
  species complex_protein_Ribo_machinery_rna_X_ in default = 0;

  // Parameters:
  kb__ = 100;
  ku_strong_ = 0.5;
  ktx_strong_ = 3.926188;
  ku_weak_ = 5;
  ktl__ = 0.05;
  kdil__ = 0.001;

  // Reactions:
  r0: dna_X + protein_RNAP_machinery => complex_dna_X_protein_RNAP_machinery_; kb__*dna_X*protein_RNAP_machinery;
  r0rev: complex_dna_X_protein_RNAP_machinery_ => dna_X + protein_RNAP_machinery; ku_strong_*complex_dna_X_protein_RNAP_machinery_;
  r1: complex_dna_X_protein_RNAP_machinery_ => dna_X + rna_X + protein_RNAP_machinery; ktx_strong_*complex_dna_X_protein_RNAP_machinery_;
  r2: rna_X + protein_Ribo_machinery => complex_protein_Ribo_machinery_rna_X_; kb__*rna_X*protein_Ribo_machinery;
  r2rev: complex_protein_Ribo_machinery_rna_X_ => rna_X + protein_Ribo_machinery; ku_weak_*complex_protein_Ribo_machinery_rna_X_;
  r3: complex_protein_Ribo_machinery_rna_X_ => rna_X + protein_X + protein_Ribo_machinery; ktl__*complex_protein_Ribo_machinery_rna_X_;
  r4: rna_X => ; kdil__*rna_X;
  r5: protein_X => ; kdil__*protein_X;

  // Unit definitions:
  unit square_metre = metre^2;
end
