// SBML level 3 version 2

model biocrnpyler_789749()
  // model units - substance: mole, time: sec, volume: litre, area: square_metre, length: metre, extent: mole

  // Compartments:
  compartment default = 1e-6;

  // Species:
  species dna_D1 in default = 1;  // substance in umol
  species rna_m1 in default = 0;  // substance in umol
  species protein_A1 in default = 0;  // substance in umol
  species protein_R1 in default = 0;  // substance in umol
  species complex_dna_D1_protein_A1_ in default = 0;  // substance in umol
  species protein_R2 in default = 0;  // substance in umol
  species complex_dna_D1_protein_R2_ in default = 0;  // substance in umol
  species dna_D2 in default = 1;  // substance in umol
  species rna_m2 in default = 0;  // substance in umol
  species protein_A2 in default = 0;  // substance in umol
  species complex_dna_D2_protein_A2_ in default = 0;  // substance in umol
  species complex_dna_D2_protein_R1_ in default = 0;  // substance in umol

  // Parameters:
  ktx_p1_leak_transcription = 0.25;
  kb_p1_A1_one_step_cooperative_binding = 1;
  ku_p1_A1_one_step_cooperative_binding = 1;
  ktx_p1_A1_transcription = 2;
  kb_p1_R2_one_step_cooperative_binding = 1;
  ku_p1_R2_one_step_cooperative_binding = 1;
  ktx_p1_R2_transcription = 1e-10;
  ktl_utr1_simple_translation = 5;
  ktx_p2_leak_transcription = 0.25;
  kb_p2_A2_one_step_cooperative_binding = 1;
  ku_p2_A2_one_step_cooperative_binding = 1;
  ktx_p2_A2_transcription = 2;
  kb_p2_R1_one_step_cooperative_binding = 1;
  ku_p2_R1_one_step_cooperative_binding = 1;
  ktx_p2_R1_transcription = 1e-10;
  kdil_protein_A1_protein_degradation = 1;
  kdil_protein_R2_protein_degradation = 1;
  kdil_protein_A2_protein_degradation = 1;
  kdil_protein_R1_protein_degradation = 1;
  kdil_rna_m2_rna_degradation = 1;
  kdil_rna_m1_rna_degradation = 1;

  // Reactions:
  r0: dna_D1 => dna_D1 + rna_m1; ktx_p1_leak_transcription*dna_D1;
  r1: protein_A1 + dna_D1 => complex_dna_D1_protein_A1_; kb_p1_A1_one_step_cooperative_binding*protein_A1*dna_D1;
  r1rev: complex_dna_D1_protein_A1_ => protein_A1 + dna_D1; ku_p1_A1_one_step_cooperative_binding*complex_dna_D1_protein_A1_;
  r2: complex_dna_D1_protein_A1_ => complex_dna_D1_protein_A1_ + rna_m1; ktx_p1_A1_transcription*complex_dna_D1_protein_A1_;
  r3: protein_R2 + dna_D1 => complex_dna_D1_protein_R2_; kb_p1_R2_one_step_cooperative_binding*protein_R2*dna_D1;
  r3rev: complex_dna_D1_protein_R2_ => protein_R2 + dna_D1; ku_p1_R2_one_step_cooperative_binding*complex_dna_D1_protein_R2_;
  r4: complex_dna_D1_protein_R2_ => complex_dna_D1_protein_R2_ + rna_m1; ktx_p1_R2_transcription*complex_dna_D1_protein_R2_;
  r5: rna_m1 => rna_m1 + protein_A1 + protein_R1; ktl_utr1_simple_translation*rna_m1;
  r6: dna_D2 => dna_D2 + rna_m2; ktx_p2_leak_transcription*dna_D2;
  r7: protein_A2 + dna_D2 => complex_dna_D2_protein_A2_; kb_p2_A2_one_step_cooperative_binding*protein_A2*dna_D2;
  r7rev: complex_dna_D2_protein_A2_ => protein_A2 + dna_D2; ku_p2_A2_one_step_cooperative_binding*complex_dna_D2_protein_A2_;
  r8: complex_dna_D2_protein_A2_ => complex_dna_D2_protein_A2_ + rna_m2; ktx_p2_A2_transcription*complex_dna_D2_protein_A2_;
  r9: protein_R1 + dna_D2 => complex_dna_D2_protein_R1_; kb_p2_R1_one_step_cooperative_binding*protein_R1*dna_D2;
  r9rev: complex_dna_D2_protein_R1_ => protein_R1 + dna_D2; ku_p2_R1_one_step_cooperative_binding*complex_dna_D2_protein_R1_;
  r10: complex_dna_D2_protein_R1_ => complex_dna_D2_protein_R1_ + rna_m2; ktx_p2_R1_transcription*complex_dna_D2_protein_R1_;
  r11: rna_m2 => rna_m2 + protein_A2 + protein_R2; ktl_utr1_simple_translation*rna_m2;
  r12: protein_A1 => ; kdil_protein_A1_protein_degradation*protein_A1;
  r13: protein_R2 => ; kdil_protein_R2_protein_degradation*protein_R2;
  r14: protein_A2 => ; kdil_protein_A2_protein_degradation*protein_A2;
  r15: protein_R1 => ; kdil_protein_R1_protein_degradation*protein_R1;
  r16: rna_m2 => ; kdil_rna_m2_rna_degradation*rna_m2;
  r17: rna_m1 => ; kdil_rna_m1_rna_degradation*rna_m1;

  // Unit definitions:
  unit square_metre = metre^2;
  unit sec = second;
  unit umol = 1e-6 mole;
end
