// SBML level 3 version 2

model autoreduce_857902()
  // model units - substance: mole, time: second, volume: litre, area: square_metre, length: metre, extent: mole

  // Compartments:
  compartment default = 1e-6;

  // Species:
  species dna_X in default = 0.5;
  species rna_X in default = 0;
  species protein_X in default = 0;

  // Parameters:
  kb__ = 100;
  ku_strong_ = 0.5;
  ktx_strong_ = 3.926188;
  ku_weak_ = 5;
  ktl__ = 0.05;
  kdil__ = 0.01;
  protein_RNAP_machinery_total = 10;
  protein_Ribo_machinery_total = 50;

  // Reactions:
  r0: => dna_X; 0;
  r1: => rna_X; (dna_X*kb__*ktx_strong_*protein_RNAP_machinery_total - kdil__*rna_X*(dna_X*kb__ + ktx_strong_ + ku_strong_))/(dna_X*kb__ + ktx_strong_ + ku_strong_);  // modifiers: dna_X
  r2: => protein_X; (kb__*ktl__*protein_Ribo_machinery_total*rna_X - kdil__*protein_X*(kb__*rna_X + ktl__ + ku_weak_))/(kb__*rna_X + ktl__ + ku_weak_);  // modifiers: rna_X

  // Unit definitions:
  unit square_metre = metre^2;
end
